# OpenSim document version 40500
Model Grip_Model_initial:
  gravity: 0 -9.80665 0
  length_units: meters
  force_units: N
  publications:
    Copyright (c) 2021-present, Northwestern University, Shirley Ryan AbilityLab, Drexel University, University of Florida, and Edward Hines VA Medical Center. All rights reserved. -------------------- The ARMS hand and wrist model has been open sourced solely for non-commercial purposes (including research, academic, evaluation and personal uses) under the BSD 3-Clause License below. By downloading or using this software, (1) you accept the terms and conditions of the aforementioned open source license, (2) acknowledge that your use of this software is non-commercial and commercial use requires a commercial license, and (3) accept that use of the model software must be acknowledged in all publications, presentations, or documents describing work in which the ARMS hand and wrist modell is used by citing the following work: McFarland DC, Binder-Markey BI, Nichols JA, Wohlman SJ,de Bruin M, Murray WM. A Musculoskeletal Model of the Hand and Wrist Capable of Simulating Functional Tasks. 2021; bioRxiv, p. 2021.12.28.474357, 2021, doi: 10.1101/2021.12.28.474357. --------- Copyright (c) 2021-present, Northwestern University, Shirley Ryan AbilityLab, Drexel University, University of Florida, and Edward Hines VA Medical Center. All rights reserved. Redistribution and use in source and binary forms, with or without modification, are permitted provided that the following conditions are met: 1. Redistributions of source code must retain the above copyright notice, this list of conditions and the following disclaimer. 2. Redistributions in binary form must reproduce the above copyright notice, this list of conditions and the following disclaimer in the documentation and/or other materials provided with the distribution. 3. Neither the name of the copyright holder nor the names of its contributors may be used to endorse or promote products derived from this software without specific prior written permission. THIS SOFTWARE IS PROVIDED BY THE COPYRIGHT HOLDERS AND CONTRIBUTORS "AS IS" AND ANY EXPRESS OR IMPLIED WARRANTIES, INCLUDING, BUT NOT LIMITED TO, THE IMPLIED WARRANTIES OF MERCHANTABILITY AND FITNESS FOR A PARTICULAR PURPOSE ARE DISCLAIMED. IN NO EVENT SHALL THE COPYRIGHT HOLDER OR CONTRIBUTORS BE LIABLE FOR ANY DIRECT, INDIRECT, INCIDENTAL, SPECIAL, EXEMPLARY, OR CONSEQUENTIAL DAMAGES (INCLUDING, BUT NOT LIMITED TO, PROCUREMENT OF SUBSTITUTE GOODS OR SERVICES; LOSS OF USE, DATA, OR PROFITS; OR BUSINESS INTERRUPTION) HOWEVER CAUSED AND ON ANY THEORY OF LIABILITY, WHETHER IN CONTRACT, STRICT LIABILITY, OR TORT (INCLUDING NEGLIGENCE OR OTHERWISE) ARISING IN ANY WAY OUT OF THE USE OF THIS SOFTWARE, EVEN IF ADVISED OF THE POSSIBILITY OF SUCH DAMAGE.
  Ground: meshes=thorax.vtp
  BodySet:
    Body clavicle: mass=0.156 [kg] mass_center=(-0.011096 0.0063723 0.054168)
        inertia=(0.00024259 0.00025526 4.4423e-5 -1.8982e-5 -6.9941e-5 5.3711e-5) meshes=clavicle.vtp
    Body scapula: mass=0.70396 mass_center=(-0.054694 -0.035032 -0.043734)
        inertia=(0.0012429 0.0011504 0.0013651 0.0004494 0.00040922 0.0002411) meshes=scapula.vtp
    Body humerus: mass=1.99757 mass_center=(0.018064 -0.140141 -0.012746)
        inertia=(0.0122776 0.00255133 0.0125789 -0.00034741 -0.0002325 0.0012293) meshes=humerus.vtp
      WrapEllipsoid Elbow_PT_ECRL: xyz_body_rotation=(-0.161094 -0.110828 0.61453) translation=(0.003 -0.2872 -0.0069)
          quadrant=x dimensions=(0.018 0.025 0.035)
    Body ulna: mass=1.1053 mass_center=(0.00971783 -0.0959509 0.024286)
        inertia=(0.00541309 0.00115318 0.00494361 0.00031686 -7.615e-5 0.00109169) meshes=ulna.vtp
    Body radius: mass=0.23359 mass_center=(0.0336341 -0.181559 0.0156)
        inertia=(0.00043855 8.859e-5 0.00040258 3.014e-5 -4.24e-6 6.418e-5) meshes=radius.vtp
      WrapTorus ECU: xyz_body_rotation=(-0.986635 -0.148877 0.222704) translation=(-0.0163 -0.2417 0.0349) quadrant=all
          inner_radius=0.006 outer_radius=0.009
    Body proximal_row: mass=0.0001 mass_center=(0 0 0) inertia=(1e-5 1e-5 1e-5 0 0 0)
        meshes=(lunate.vtp sdfastSCAPHOIDw.vtp sdfastPISIFORMw.vtp sdfastTRIQUETRALw.vtp)
      WrapEllipsoid EIP: xyz_body_rotation=(-0.250804 0.285536 0.232827) translation=(0.0007 -0.0135 0.0047) quadrant=z
          dimensions=(0.05 0.02 0.013)
      WrapTorus ECRL: xyz_body_rotation=(1.53833 0.234398 0.731118) translation=(0.0222 -0.0096 0.0208) quadrant=all
          inner_radius=0.008 outer_radius=0.016
      WrapTorus ECRB: xyz_body_rotation=(1.31266 -0.11781 -0.116239) translation=(0.0126 -0.0095 0.0186) quadrant=all
          inner_radius=0.008 outer_radius=0.01
      WrapTorus FCR: xyz_body_rotation=(-1.55596 -0.15324 -0.100007) translation=(0.0032 -0.0045 -0.019) quadrant=all
          inner_radius=0.001 outer_radius=0.0025
      WrapTorus FCU: xyz_body_rotation=(-1.57376 -0.0797616 0.39235) translation=(-0.0123 -0.0124 -0.0171) quadrant=all
          inner_radius=0.0068 outer_radius=0.008
      WrapEllipsoid PL: xyz_body_rotation=(-0.0315905 0.0996583 0.0633554) translation=(0.0057 -0.018 -0.0041)
          quadrant=-z dimensions=(0.025 0.014 0.012)
      WrapEllipsoid FDS: xyz_body_rotation=(0.00837758 -0.0816814 -0.0171042) translation=(0.0012 -0.0057 -0.0003)
          quadrant=-z dimensions=(0.025 0.013 0.012)
      WrapEllipsoid FDP: xyz_body_rotation=(-1.46747 -0.194604 0.121824) translation=(-0.0022 -0.0069 0.0032)
          quadrant=y dimensions=(0.025 0.013 0.012)
      WrapTorus EDCL: xyz_body_rotation=(2.36318 0.193033 -0.26913) translation=(-0.0128 -0.0133 0.0148) quadrant=all
          inner_radius=0.008 outer_radius=0.012
      WrapTorus EDCR: xyz_body_rotation=(1.98392 0.100531 0.523075) translation=(-0.0098 -0.0137 0.0166) quadrant=all
          inner_radius=0.0105 outer_radius=0.011
      WrapTorus EDCM: xyz_body_rotation=(1.99317 0.19792 0.368264) translation=(-0.0007 -0.0117 0.0191) quadrant=all
          inner_radius=0.009 outer_radius=0.012
      WrapTorus EDCI: xyz_body_rotation=(1.69768 0.0897099 0.00767945) translation=(0.009 -0.0149 0.0211) quadrant=all
          inner_radius=0.009 outer_radius=0.012
      WrapEllipsoid EDM: xyz_body_rotation=(2.9627 0.159349 0.117984) translation=(-0.0167 -0.0022 0.0048) quadrant=-z
          dimensions=(0.018 0.014 0.008)
      WrapEllipsoid FPL: xyz_body_rotation=(-0.16633 -0.082205 -0.0659735) translation=(0.018 -0.024 -0.0053)
          quadrant=-z dimensions=(0.016 0.01 0.01)
    Body capitate: mass=0.32742 mass_center=(-0.00028 0.00333 -0.0045) inertia=(1.50577e-5 3.36765e-5 3.96251e-5 0 0 0)
        meshes=capitate.vtp
    Body trapezium: mass=1e-5 mass_center=(0 0 0) inertia=(1e-5 1e-5 1e-5 0 0 0) meshes=trapezium.vtp
    Body trapezoid: mass=1e-5 mass_center=(0 0 0) inertia=(1e-5 1e-5 1e-5 0 0 0) meshes=trapezoid.vtp
    Body hamate: mass=1e-5 mass_center=(0 0 0) inertia=(1e-5 1e-5 1e-5 0 0 0) meshes=hamate.vtp
    Body firstmc1: mass=1e-5 mass_center=(0 0 0) inertia=(1e-5 1e-5 1e-5 0 0 0)
    Body firstmc: mass=0.016 mass_center=(0.00784 -0.01472 -0.00602)
        inertia=(2.37885e-6 1.42171e-6 2.52462e-6 9.44456e-7 5.02069e-7 -8.17251e-7) meshes=1mc.vtp
      WrapCylinder MPthumb: xyz_body_rotation=(0.321315 0.11013 -0.834791) translation=(0.0177 -0.0305 -0.0143)
          quadrant=all radius=0.0085 length=0.02
    Body proximal_thumb: mass=0.0079 mass_center=(0.0096 -0.0163 -0.0063)
        inertia=(5.21128e-7 3.19263e-7 5.85041e-7 1.89419e-7 7.52377e-8 -1.25343e-7) meshes=thumbprox.vtp
      WrapCylinder IPthumb: xyz_body_rotation=(0.304734 0.0129154 0.0879646) translation=(0.0121 -0.0302 -0.0096)
          quadrant=-x radius=0.0045 length=0.01
    Body distal_thumb: mass=0.0031 mass_center=(0.00557 -0.01042 -0.0044)
        inertia=(9.21409e-8 6.4461e-8 1.0021e-7 2.83547e-8 1.30692e-8 -2.09219e-8) meshes=thumbdist.vtp
    Body secondmc: mass=0.03636364 mass_center=(0 0 0)
        inertia=(9.77694e-6 5.2901e-7 9.74293e-6 1.45439e-6 -2.39734e-7 1.56119e-6) meshes=2mc.vtp
      WrapCylinder 2ndmcp_extI: xyz_body_rotation=(0.593936 1.50011 -1.99125) translation=(0.003501 -0.025 0.0038)
          quadrant=all radius=0.009 length=0.01
      WrapCylinder 2ndmcp_FDSI: xyz_body_rotation=(0.593936 1.50011 -2.16578) translation=(0.003501 -0.0275 0.00362)
          quadrant=Y radius=0.011 length=0.02
      WrapCylinder 2ndmcp_FDPI: xyz_body_rotation=(0.593936 1.50011 -2.23559) translation=(0.003501 -0.0275 0.00362)
          quadrant=Y radius=0.0102 length=0.02
    Body thirdmc: mass=0.03809524 mass_center=(0 0 0)
        inertia=(8.88872e-6 2.94745e-7 8.74396e-6 1.28499e-7 -1.67854e-8 1.12285e-6) meshes=3mc.vtp
      WrapCylinder _3rdmcp: xyz_body_rotation=(2.57942 -1.44967 2.90615) translation=(0.0016 -0.0271 0.0001)
          quadrant=all radius=0.005 length=0.02
    Body fourthmc: mass=0.03333333 mass_center=(-0.002 -0.0214 0.0034)
        inertia=(6.85118e-6 3.48871e-7 6.79306e-6 -7.03734e-7 1.00224e-7 9.36766e-7) meshes=4mc_new.vtp
      WrapCylinder _4thmcp: xyz_body_rotation=(-2.97212 -1.22173 -2.46318)
          translation=(-0.0057013 -0.0508692 0.0044135) quadrant=all radius=0.005 length=0.02
    Body fifthmc: mass=0.02962963 mass_center=(-0.00611809 -0.0176936 0.00542873)
        inertia=(4.76564e-6 5.73128e-7 4.8195e-6 -1.05652e-6 2.22645e-7 9.3644e-7) meshes=5mc_new.vtp
      WrapCylinder _5thmcp: xyz_body_rotation=(-2.67175 -1.5 -2.46598) translation=(-0.0130014 -0.0430027 0.0100162)
          quadrant=all radius=0.005 length=0.02
      WrapEllipsoid 5thmcp: xyz_body_rotation=(-2.67175 -1.5 -2.46598) translation=(-0.015 -0.0429103 0.008)
          quadrant=-x dimensions=(0.005 0.005 0.0065)
    Body 2proxph: mass=0.0158 mass_center=(0.0044 -0.0253 0.004)
        inertia=(2.41151e-6 5.63074e-7 2.40133e-6 3.31406e-7 -6.25061e-8 3.595e-7) meshes=2proxph.vtp
      WrapCylinder 2ndpm_FDSI: xyz_body_rotation=(-2.99394 1.28823 1.41721) translation=(0.0075 -0.041 0.0045)
          quadrant=all radius=0.0055 length=0.01
      WrapCylinder 2ndpm_FDPI: xyz_body_rotation=(-2.99394 1.28823 1.41721) translation=(0.0075 -0.0405 0.008)
          quadrant=y radius=0.008 length=0.02
      WrapCylinder 2ndpm_extI: xyz_body_rotation=(-2.99394 1.28823 1.41721) translation=(0.0075 -0.04075 0.0073)
          quadrant=-y radius=0.00425 length=0.012
      WrapCylinder Secondpm: xyz_body_rotation=(0.741939 -1.47393 0.709651) translation=(0.0075 -0.0407 0.0061)
          quadrant=x radius=0.004 length=0.01
    Body 2midph: mass=0.0049 mass_center=(0.0022 -0.0154 0.00018)
        inertia=(2.83258e-7 7.29644e-8 2.85452e-7 2.38649e-8 -1.13365e-9 1.01166e-8) meshes=2midph.vtp
      WrapCylinder 2ndmd_extI: xyz_body_rotation=(-2.755 1.36537 1.1767) translation=(0.0033 -0.0215 0.0035)
          quadrant=-y radius=0.004 length=0.01
      WrapCylinder Secondmd: xyz_body_rotation=(0.501782 -1.41302 0.647343) translation=(0.0036 -0.0243 0.0003)
          quadrant=x radius=0.004 length=0.01
    Body 2distph: mass=0.0018 mass_center=(0.0013 -0.01 2e-5)
        inertia=(4.55172e-8 1.5752e-8 4.61775e-8 5.5272e-9 -5.75024e-10 3.19996e-9) meshes=2distph.vtp
    Body 3proxph: mass=0.0193 mass_center=(0.00097 -0.0262 0.0037)
        inertia=(3.52375e-6 6.16459e-7 3.51005e-6 8.59086e-8 -6.41769e-9 2.17375e-7) meshes=3proxph.vtp
      WrapCylinder Thirdpm: xyz_body_rotation=(1.80886 -1.50604 1.85319) translation=(0.0017 -0.0439 0.005)
          quadrant=all radius=0.005 length=0.01
    Body 3midph: mass=0.00642 mass_center=(0.00071 -0.0168 0.0013)
        inertia=(5.24504e-7 1.0143e-7 5.2473e-7 1.99401e-8 -8.17162e-10 1.73764e-8) meshes=3midph.vtp
      WrapCylinder Thirdmd: xyz_body_rotation=(1.37881 -1.4933 1.51861) translation=(0.0014 -0.028 0.0012) quadrant=x
          radius=0.004 length=0.01
    Body 3distph: mass=0.00252 mass_center=(0.0005 -0.0102 -0.00028)
        inertia=(8.07596e-8 2.65112e-8 8.05851e-8 4.0623e-9 -3.79846e-10 5.10078e-9) meshes=3distph.vtp
    Body 4proxph: mass=0.01374 mass_center=(-0.00223386 -0.0237516 0.00349321)
        inertia=(1.95194e-6 3.90612e-7 1.95683e-6 -2.0172e-7 2.30682e-8 1.81482e-7) meshes=4proxph_new.vtp
      WrapCylinder Fourthpm: xyz_body_rotation=(0 -1.5 0) translation=(-0.00416056 -0.0398013 0.00417815) quadrant=all
          radius=0.004 length=0.01
    Body 4midph: mass=0.00568 mass_center=(-0.00197812 -0.0147055 0.00118627)
        inertia=(3.60389e-7 9.43143e-8 3.60306e-7 -2.36509e-8 2.12726e-9 2.41196e-8) meshes=4midph_new.vtp
      WrapCylinder Fourthmd: xyz_body_rotation=(0 -1.5 0) translation=(-0.00263942 -0.023 0.00256231) quadrant=x
          radius=0.005 length=0.01
    Body 4distph: mass=0.0029 mass_center=(-0.000427077 -0.0101666 0.00202904)
        inertia=(9.90716e-8 3.64408e-8 9.65165e-8 -5.72303e-9 1.26263e-9 1.39322e-8) meshes=4distph_new.vtp
    Body 5proxph: mass=0.01106 mass_center=(-0.00810107 -0.0210768 0.00214055)
        inertia=(1.18153e-6 3.71642e-7 1.29122e-6 -3.28491e-7 2.81259e-8 7.93172e-8) meshes=5proxph_new.vtp
      WrapCylinder Fifthpm: xyz_body_rotation=(-1.75 -1.1 -2.95449) translation=(-0.0133173 -0.0327233 0.00294018)
          quadrant=all radius=0.004 length=0.01
    Body 5midph: mass=0.00372 mass_center=(-0.00489968 -0.0121355 -0.000152595)
        inertia=(1.56521e-7 6.14486e-8 1.702e-7 -4.00308e-8 3.68865e-9 1.01068e-8) meshes=5midph_new.vtp
      WrapCylinder Fifthmd: xyz_body_rotation=(-2 -1.25 -1.75) translation=(-0.00736879 -0.0194062 0.00136094)
          quadrant=x radius=0.005 length=0.01
    Body 5distph: mass=0.00222 mass_center=(-0.00358265 -0.00888113 0.000331822)
        inertia=(5.05502e-8 2.88772e-8 5.59113e-8 -1.23535e-8 1.14735e-9 2.53269e-9) meshes=5distph_new.vtp
    Body GripForceBody: mass=1e-5 mass_center=(0 0 0) inertia=(1e-5 1e-5 1e-5 0 0 0) meshes=
  JointSet:
    WeldJoint sternoclavicular: socket_parent_frame=ground_offset socket_child_frame=clavicle_offset
      PhysicalOffsetFrame ground_offset: socket_parent=/ground translation=(0.006325 0.00693 0.025465) [meters]
      PhysicalOffsetFrame clavicle_offset: socket_parent=/bodyset/clavicle translation=(0 0 0)
    WeldJoint acromioclavicular: socket_parent_frame=clavicle_offset socket_child_frame=scapula_offset
      PhysicalOffsetFrame clavicle_offset: socket_parent=/bodyset/clavicle translation=(-0.01433 0.02007 0.135535)
      PhysicalOffsetFrame scapula_offset: socket_parent=/bodyset/scapula translation=(0 0 0)
    WeldJoint shoulder2: socket_parent_frame=scapula_offset socket_child_frame=humerus_offset
      PhysicalOffsetFrame scapula_offset: socket_parent=/bodyset/scapula translation=(-0.00955 -0.034 0.009)
      PhysicalOffsetFrame humerus_offset: socket_parent=/bodyset/humerus translation=(0 0 0)
    WeldJoint elbow: socket_parent_frame=humerus_offset socket_child_frame=ulna_offset
      PhysicalOffsetFrame humerus_offset: socket_parent=/bodyset/humerus translation=(0.0061 -0.2904 -0.0123)
          orientation=(0.0129174 0.0860126 1.56835) [radians]
      PhysicalOffsetFrame ulna_offset: socket_parent=/bodyset/ulna translation=(0 0 0)
    WeldJoint radioulnar: socket_parent_frame=ulna_offset socket_child_frame=radius_offset
      PhysicalOffsetFrame ulna_offset: socket_parent=/bodyset/ulna translation=(0.0004 -0.011503 0.019999)
      PhysicalOffsetFrame radius_offset: socket_parent=/bodyset/radius translation=(0 0 0)
    CustomJoint radiocarpal: socket_parent_frame=radius_offset socket_child_frame=proximal_row_offset
      Coordinate deviation: default_value=5.802692e-8 range=(-0.1745329 0.4363323) clamped=true
      Coordinate flexion: default_value=-1.866968e-11 range=(-1.22173 1.22173) clamped=true
      PhysicalOffsetFrame radius_offset: socket_parent=/bodyset/radius translation=(0.018 -0.242 0.025)
      PhysicalOffsetFrame proximal_row_offset: socket_parent=/bodyset/proximal_row translation=(0 0 0)
      SpatialTransform: axes_held_at_zero=(rotation2 translation1 translation2 translation3)
        TransformAxis rotation1: coordinates=deviation axis=(-0.819064 -0.135611 -0.557444)
          SimmSpline: x=(-0.174533 0 0.436332) y=(-0.174533 0 0.436332)
        TransformAxis rotation3: coordinates=flexion axis=(0.9564267 -0.2522069 0.147104)
          SimmSpline: x=(-1.5708 1.5708) y=(-0.785398 0.785398)
    CustomJoint wrist_hand: socket_parent_frame=proximal_row_offset socket_child_frame=capitate_offset
      Coordinate wrist_hand_r1: default_value=7.87507e-8 range=(-99999.9 99999.9) clamped=false
      Coordinate wrist_hand_r3: default_value=-9.334866e-12 range=(-99999.9 99999.9) clamped=false
      PhysicalOffsetFrame proximal_row_offset: socket_parent=/bodyset/proximal_row
          translation=(0.003992 -0.015054 0.002327)
      PhysicalOffsetFrame capitate_offset: socket_parent=/bodyset/capitate translation=(0 0 0)
      SpatialTransform: axes_held_at_zero=(rotation3 translation1 translation2 translation3)
        TransformAxis rotation1: coordinates=wrist_hand_r1 axis=(0.8991357 -0.3490529 -0.2640399)
            LinearFunction(coefficients=1 0)
        TransformAxis rotation2: coordinates=wrist_hand_r3 axis=(0.9971185 0.01069999 -0.07510096)
            LinearFunction(coefficients=1 0)
    WeldJoint cap_trpzm: socket_parent_frame=capitate_offset socket_child_frame=trapezium_offset
      PhysicalOffsetFrame capitate_offset: socket_parent=/bodyset/capitate translation=(0.015293 -0.004569 -0.010308)
      PhysicalOffsetFrame trapezium_offset: socket_parent=/bodyset/trapezium translation=(0 0 0)
    WeldJoint cap_trpzd: socket_parent_frame=capitate_offset socket_child_frame=trapezoid_offset
      PhysicalOffsetFrame capitate_offset: socket_parent=/bodyset/capitate translation=(0.009143 -0.004062 -0.002464)
      PhysicalOffsetFrame trapezoid_offset: socket_parent=/bodyset/trapezoid translation=(0 0 0)
    WeldJoint cap_ham: socket_parent_frame=capitate_offset socket_child_frame=hamate_offset
      PhysicalOffsetFrame capitate_offset: socket_parent=/bodyset/capitate translation=(-0.010969 -0.002495 -0.00075)
      PhysicalOffsetFrame hamate_offset: socket_parent=/bodyset/hamate translation=(0 0 0)
    CustomJoint CMC1a: socket_parent_frame=trapezium_offset socket_child_frame=firstmc1_offset
      Coordinate cmc_flexion: default_value=0.2543817 range=(-0.7853982 0.2617994) clamped=false
      PhysicalOffsetFrame trapezium_offset: socket_parent=/bodyset/trapezium translation=(0 0 0)
      PhysicalOffsetFrame firstmc1_offset: socket_parent=/bodyset/firstmc1 translation=(0 0 0)
      SpatialTransform: axes_held_at_zero=(rotation1 rotation2 translation1 translation2 translation3)
        TransformAxis rotation3: coordinates=cmc_flexion axis=(0.04239899 0.6652858 -0.7453838)
            LinearFunction(coefficients=1 0)
    CustomJoint CMC1b: socket_parent_frame=firstmc1_offset socket_child_frame=firstmc_offset
      Coordinate cmc_abduction: default_value=0.8363268 range=(-0.4363323 0.836332) clamped=false
      PhysicalOffsetFrame firstmc1_offset: socket_parent=/bodyset/firstmc1 translation=(0.0072 -0.0054 -0.0025)
      PhysicalOffsetFrame firstmc_offset: socket_parent=/bodyset/firstmc translation=(0 0 0)
      SpatialTransform: axes_held_at_zero=(rotation2 rotation3 translation1 translation2 translation3)
        TransformAxis rotation1: coordinates=cmc_abduction axis=(0.495557 0.731736 0.467959)
            LinearFunction(coefficients=1 0)
    CustomJoint MCP: socket_parent_frame=firstmc_offset socket_child_frame=proximal_thumb_offset
      Coordinate mp_flexion: default_value=-3.441947e-13 range=(-0.6981317 0.7853982) clamped=false
      PhysicalOffsetFrame firstmc_offset: socket_parent=/bodyset/firstmc translation=(0.0165 -0.0292 -0.0127)
      PhysicalOffsetFrame proximal_thumb_offset: socket_parent=/bodyset/proximal_thumb translation=(0 0 0)
      SpatialTransform: axes_held_at_zero=(rotation1 rotation2 translation1 translation2 translation3)
        TransformAxis rotation3: coordinates=mp_flexion axis=(0.084295 0.203488 -0.975442)
            LinearFunction(coefficients=1 0)
    CustomJoint IP: socket_parent_frame=proximal_thumb_offset socket_child_frame=distal_thumb_offset
      Coordinate ip_flexion: default_value=5.600544e-13 range=(-0.4363323 1.308997) clamped=false
      PhysicalOffsetFrame proximal_thumb_offset: socket_parent=/bodyset/proximal_thumb
          translation=(0.014 -0.0259 -0.0101)
      PhysicalOffsetFrame distal_thumb_offset: socket_parent=/bodyset/distal_thumb translation=(0 0 0)
      SpatialTransform: axes_held_at_zero=(rotation1 rotation2 translation1 translation2 translation3)
        TransformAxis rotation3: coordinates=ip_flexion axis=(0.05010201 0.4796231 -0.8760431)
            LinearFunction(coefficients=1 0)
    WeldJoint CMC2: socket_parent_frame=capitate_offset socket_child_frame=secondmc_offset
      PhysicalOffsetFrame capitate_offset: socket_parent=/bodyset/capitate translation=(0.014685 -0.03762 0.005032)
      PhysicalOffsetFrame secondmc_offset: socket_parent=/bodyset/secondmc translation=(0 0 0)
    WeldJoint CMC3: socket_parent_frame=capitate_offset socket_child_frame=thirdmc_offset
      PhysicalOffsetFrame capitate_offset: socket_parent=/bodyset/capitate translation=(0.000477 -0.039239 0.007377)
      PhysicalOffsetFrame thirdmc_offset: socket_parent=/bodyset/thirdmc translation=(0 0 0)
    CustomJoint CMC4: socket_parent_frame=capitate_offset socket_child_frame=fourthmc_offset
      Coordinate 4cmc_flexion: default_value=9.529268e-6 range=(0 0.2032) clamped=true
      PhysicalOffsetFrame capitate_offset: socket_parent=/bodyset/capitate translation=(-0.0097 -0.0147 0.0015)
      PhysicalOffsetFrame fourthmc_offset: socket_parent=/bodyset/fourthmc translation=(0 0 0)
      SpatialTransform: axes_held_at_zero=(rotation2 rotation3 translation1 translation2 translation3)
        TransformAxis rotation1: coordinates=4cmc_flexion axis=(0.58 -0.8006 -0.1506) LinearFunction(coefficients=1 0)
    CustomJoint CMC5: socket_parent_frame=capitate_offset socket_child_frame=fifthmc_offset
      Coordinate CMC5_r1: default_value=2.592411e-5 range=(-99999.9 99999.9) clamped=false locked=true
      PhysicalOffsetFrame capitate_offset: socket_parent=/bodyset/capitate translation=(-0.0171 -0.0118 -0.0036)
      PhysicalOffsetFrame fifthmc_offset: socket_parent=/bodyset/fifthmc translation=(0 0 0)
      SpatialTransform: axes_held_at_zero=(rotation2 rotation3 translation1 translation2 translation3)
        TransformAxis rotation1: coordinates=CMC5_r1 axis=(0.3718 -0.8665 0.3333) LinearFunction(coefficients=1 0)
    CustomJoint _2MCP: socket_parent_frame=secondmc_offset socket_child_frame=2proxph_offset
      Coordinate 2mcp_abduction: default_value=8.008044e-27 range=(-0.2617994 0.2617994) clamped=true
      Coordinate 2mcp_flexion: default_value=1.606675e-8 range=(-0.7853982 1.570796) clamped=true
      PhysicalOffsetFrame secondmc_offset: socket_parent=/bodyset/secondmc
          translation=(0.003501054 -0.02824267 0.003619925) orientation=(-0.1551909 -0.01780544 0.1244511)
      PhysicalOffsetFrame 2proxph_offset: socket_parent=/bodyset/2proxph
          translation=(1.526608e-8 1.679678e-7 1.034438e-7) orientation=(-0.1588528 -0.0191149 0.173886)
      SpatialTransform: axes_held_at_zero=(rotation3 translation1 translation2 translation3)
        TransformAxis rotation1: coordinates=2mcp_abduction axis=(0.214609 0.191508 0.957741)
            LinearFunction(coefficients=1 0)
        TransformAxis rotation2: coordinates=2mcp_flexion axis=(1 0 0) LinearFunction(coefficients=1 0)
    CustomJoint _2prox-midph_b: socket_parent_frame=2proxph_offset socket_child_frame=2midph_offset
      Coordinate 2pm_flexion: default_value=0.0001853992 range=(0 1.745329) clamped=true
      PhysicalOffsetFrame 2proxph_offset: socket_parent=/bodyset/2proxph
          translation=(0.007517167 -0.04127294 0.00732597) orientation=(-0.0970607 0.1353229 0.1917353)
      PhysicalOffsetFrame 2midph_offset: socket_parent=/bodyset/2midph
          translation=(-2.100748e-7 7.530046e-8 2.773907e-7) orientation=(-0.1025545 0.1150008 0.07789768)
      SpatialTransform: axes_held_at_zero=(rotation2 rotation3 translation1 translation2 translation3)
        TransformAxis rotation1: coordinates=2pm_flexion axis=(1 0 0) LinearFunction(coefficients=1 0)
    CustomJoint _2mid-distph: socket_parent_frame=2midph_offset socket_child_frame=2distph_offset
      Coordinate 2md_flexion: default_value=2.541013e-7 range=(-0.069813 1.396263) clamped=true
      PhysicalOffsetFrame 2midph_offset: socket_parent=/bodyset/2midph
          translation=(0.003332946 -0.02488827 0.001220219) orientation=(-0.04409651 0.07687872 0.05524972)
      PhysicalOffsetFrame 2distph_offset: socket_parent=/bodyset/2distph
          translation=(-2.940872e-7 3.782233e-7 1.059007e-7) orientation=(8.451472e-5 -0.00547101 0.1708355)
      SpatialTransform: axes_held_at_zero=(rotation2 rotation3 translation1 translation2 translation3)
        TransformAxis rotation1: coordinates=2md_flexion axis=(1 0 0) LinearFunction(coefficients=1 0)
    CustomJoint _3MCP: socket_parent_frame=thirdmc_offset socket_child_frame=3proxph_offset
      Coordinate 3mcp_abduction: default_value=-2.151995e-25 range=(-0.2617994 0.2617994) clamped=true
      Coordinate 3mcp_flexion: default_value=1.500869e-8 range=(-0.7853982 1.570796) clamped=true
      PhysicalOffsetFrame thirdmc_offset: socket_parent=/bodyset/thirdmc
          translation=(0.0002397144 -0.02628995 0.001778115) orientation=(-0.07248899 -0.0008278245 -0.03786287)
      PhysicalOffsetFrame 3proxph_offset: socket_parent=/bodyset/3proxph
          translation=(5.358864e-8 3.115767e-7 -5.398232e-8) orientation=(-0.06844895 8.897542e-9 -2.578402e-10)
      SpatialTransform: axes_held_at_zero=(rotation3 translation1 translation2 translation3)
        TransformAxis rotation1: coordinates=3mcp_abduction axis=(-0.021499 0.118897 0.992674)
            LinearFunction(coefficients=1 0)
        TransformAxis rotation2: coordinates=3mcp_flexion axis=(1 0 0) LinearFunction(coefficients=1 0)
    CustomJoint _3prox-midph_b: socket_parent_frame=3proxph_offset socket_child_frame=3midph_offset
      Coordinate 3pm_flexion: default_value=0.0001716712 range=(0 1.745329) clamped=true
      PhysicalOffsetFrame 3proxph_offset: socket_parent=/bodyset/3proxph
          translation=(0.001650347 -0.04421065 0.006230041) orientation=(-0.01483852 0.008060484 0.008660993)
      PhysicalOffsetFrame 3midph_offset: socket_parent=/bodyset/3midph
          translation=(-3.016034e-7 -1.430727e-8 2.83829e-7) orientation=(-0.00609824 -0.01667389 0.02266941)
      SpatialTransform: axes_held_at_zero=(rotation2 rotation3 translation1 translation2 translation3)
        TransformAxis rotation1: coordinates=3pm_flexion axis=(1 0 0) LinearFunction(coefficients=1 0)
    CustomJoint _3mid-distph: socket_parent_frame=3midph_offset socket_child_frame=3distph_offset
      Coordinate 3md_flexion: default_value=1.545962e-7 range=(-0.087266 1.396263) clamped=true
      PhysicalOffsetFrame 3midph_offset: socket_parent=/bodyset/3midph
          translation=(0.001365386 -0.02904728 0.001954004) orientation=(0.01218447 0.03435746 0.003736342)
      PhysicalOffsetFrame 3distph_offset: socket_parent=/bodyset/3distph
          translation=(1.98679e-7 2.557395e-7 -9.181374e-8) orientation=(0.0126361 -0.005789499 0.03581734)
      SpatialTransform: axes_held_at_zero=(rotation2 rotation3 translation1 translation2 translation3)
        TransformAxis rotation1: coordinates=3md_flexion axis=(1 0 0) LinearFunction(coefficients=1 0)
    CustomJoint _4MCP: socket_parent_frame=fourthmc_offset socket_child_frame=4proxph_offset
      Coordinate 4mcp_abduction: default_value=3.529152e-12 range=(-0.2617994 0.2617994) clamped=true
      Coordinate 4mcp_flexion: default_value=2.203964e-8 range=(-0.7853982 1.570796) clamped=true
      PhysicalOffsetFrame fourthmc_offset: socket_parent=/bodyset/fourthmc
          translation=(-0.005299951 -0.04889986 0.00700002) orientation=(-0.09982692 0.01214006 -0.1206153)
      PhysicalOffsetFrame 4proxph_offset: socket_parent=/bodyset/4proxph
          translation=(1.11096e-7 -8.3297e-8 1.779742e-7) orientation=(-0.1186534 0.03224953 -0.09533407)
      SpatialTransform: axes_held_at_zero=(rotation3 translation1 translation2 translation3)
        TransformAxis rotation1: coordinates=4mcp_abduction axis=(-0.022094 0.144366 0.989278)
            LinearFunction(coefficients=1 0)
        TransformAxis rotation2: coordinates=4mcp_flexion axis=(1 0 0) LinearFunction(coefficients=1 0)
    CustomJoint _4prox-midph_b: socket_parent_frame=4proxph_offset socket_child_frame=4midph_offset
      Coordinate 4pm_flexion: default_value=0.0001809397 range=(0 1.745329) clamped=true
      PhysicalOffsetFrame 4proxph_offset: socket_parent=/bodyset/4proxph translation=(-0.003829 -0.03973605 0.005699)
          orientation=(-0.1163566 -0.2421953 -0.1150524)
      PhysicalOffsetFrame 4midph_offset: socket_parent=/bodyset/4midph
          translation=(-3.566021e-7 -7.771478e-7 2.239663e-8) orientation=(-0.1045019 -0.1489546 -0.06365621)
      SpatialTransform: axes_held_at_zero=(rotation2 rotation3 translation1 translation2 translation3)
        TransformAxis rotation1: coordinates=4pm_flexion axis=(1 0 0) LinearFunction(coefficients=1 0)
    CustomJoint _4mid-distph: socket_parent_frame=4midph_offset socket_child_frame=4distph_offset
      Coordinate 4md_flexion: default_value=5.342894e-7 range=(-0.069813 1.396263) clamped=true
      PhysicalOffsetFrame 4midph_offset: socket_parent=/bodyset/4midph translation=(-0.002599 -0.02449981 0.003299)
          orientation=(-0.04700437 -0.1634079 -0.09918015)
      PhysicalOffsetFrame 4distph_offset: socket_parent=/bodyset/4distph translation=(5.490752e-8 1e-6 -8.040111e-9)
          orientation=(-0.03270649 -0.1651122 -0.0707403)
      SpatialTransform: axes_held_at_zero=(rotation2 rotation3 translation1 translation2 translation3)
        TransformAxis rotation1: coordinates=4md_flexion axis=(1 0 0) LinearFunction(coefficients=1 0)
    CustomJoint _5MCP: socket_parent_frame=fifthmc_offset socket_child_frame=5proxph_offset
      Coordinate 5mcp_abduction: default_value=2.037767e-12 range=(-0.2617994 0.2617994) clamped=true
      Coordinate 5mcp_flexion: default_value=1.413091e-8 range=(-0.7853982 1.570796) clamped=true
      PhysicalOffsetFrame fifthmc_offset: socket_parent=/bodyset/fifthmc
          translation=(-0.01109955 -0.0422992 0.009700068) orientation=(-0.2122414 -0.2393684 -0.2522972)
      PhysicalOffsetFrame 5proxph_offset: socket_parent=/bodyset/5proxph
          translation=(1.179624e-7 5.846832e-7 1.146889e-7) orientation=(-0.2311924 -0.2139642 -0.3340111)
      SpatialTransform: axes_held_at_zero=(rotation3 translation1 translation2 translation3)
        TransformAxis rotation1: coordinates=5mcp_abduction axis=(-0.025001 0.216206 0.976028)
            LinearFunction(coefficients=1 0)
        TransformAxis rotation2: coordinates=5mcp_flexion axis=(1 0 0) LinearFunction(coefficients=1 0)
    CustomJoint _5prox-midph_b: socket_parent_frame=5proxph_offset socket_child_frame=5midph_offset
      Coordinate 5pm_flexion: default_value=0.000176367 range=(0 1.745329) clamped=true
      PhysicalOffsetFrame 5proxph_offset: socket_parent=/bodyset/5proxph
          translation=(-0.0124998 -0.03349979 0.004299984) orientation=(-0.03084101 -0.1719446 -0.4071098)
      PhysicalOffsetFrame 5midph_offset: socket_parent=/bodyset/5midph
          translation=(1.296877e-7 3.204101e-7 3.940236e-8) orientation=(0.005251835 -0.1428965 -0.3051316)
      SpatialTransform: axes_held_at_zero=(rotation2 rotation3 translation1 translation2 translation3)
        TransformAxis rotation1: coordinates=5pm_flexion axis=(1 0 0) LinearFunction(coefficients=1 0)
    CustomJoint _5mid-distph: socket_parent_frame=5midph_offset socket_child_frame=5distph_offset
      Coordinate 5md_flexion: default_value=1.597489e-5 range=(-0.05236 1.396263) clamped=true
      PhysicalOffsetFrame 5midph_offset: socket_parent=/bodyset/5midph
          translation=(-0.007499658 -0.01950022 0.001999983) orientation=(-0.05646008 -0.1270581 -0.2846894)
      PhysicalOffsetFrame 5distph_offset: socket_parent=/bodyset/5distph
          translation=(3.23505e-7 -7.243366e-9 -1.016706e-7) orientation=(-0.02030409 -0.07074682 -0.3326791)
      SpatialTransform: axes_held_at_zero=(rotation2 rotation3 translation1 translation2 translation3)
        TransformAxis rotation1: coordinates=5md_flexion axis=(1 0 0) LinearFunction(coefficients=1 0)
    WeldJoint GripForceJoint: socket_parent_frame=ground_offset socket_child_frame=GripForceBody_offset
      PhysicalOffsetFrame ground_offset: socket_parent=/ground translation=(0.325517 -0.275632 0.179819)
          orientation=(0 0 1.570796)
      PhysicalOffsetFrame GripForceBody_offset: socket_parent=/bodyset/GripForceBody translation=(0 0 0)
  ConstraintSet:
    CoordinateCouplerConstraint CMC5_r1_con: independent_coordinate_names=4cmc_flexion
        dependent_coordinate_name=CMC5_r1
      coupled_coordinates_function: SimmSpline: x=(0 0.2032) y=(0 0.5528)
    CoordinateCouplerConstraint wrist_hand_r1_con: independent_coordinate_names=deviation
        dependent_coordinate_name=wrist_hand_r1 scale_factor=1
      coupled_coordinates_function: SimmSpline f18: x=(-0.174533 0 0.436332) y=(-0.261799 0 0.436332)
    CoordinateCouplerConstraint wrist_hand_r3_con: independent_coordinate_names=flexion
        dependent_coordinate_name=wrist_hand_r3 scale_factor=1
      coupled_coordinates_function: SimmSpline f19: x=(-1.22173 1.22173) y=(-0.610865 0.610865)
  ForceSet:
    CoordinateLimitForce deviation_ligaments: coordinate=deviation upper_stiffness=3013.535 [N*m/degree]
        upper_limit=0.3490659 [degrees] lower_stiffness=27913.13 [N*m/degree] lower_limit=-0.1047198 [degrees]
        damping=0 transition=0.6834465 [degrees]
    CoordinateLimitForce deviation_damping: coordinate=deviation upper_stiffness=5.729578e-7 upper_limit=3.316126
        lower_stiffness=5.729578e-7 lower_limit=3.316126 damping=0.09998114 transition=0.01745329
    CoordinateLimitForce flexion_ligaments: coordinate=flexion upper_stiffness=11459.16 upper_limit=1.047198
        lower_stiffness=7753.448 lower_limit=-1.047198 damping=0 transition=1.62169
    CoordinateLimitForce flexion_damping: coordinate=flexion upper_stiffness=5.729578e-7 upper_limit=3.316126
        lower_stiffness=5.729578e-7 lower_limit=3.316126 damping=0.02499987 transition=0.01745329
    FunctionBasedBushingForce [values shared by the 12 below unless stated]: translational_damping=(0 0 0)
        moment_visual_scale=0.005 force_visual_scale=0.005 visual_aspect_ratio=5 m_y_theta_y_function=Constant(value=0)
        m_z_theta_z_function=Constant(value=0) f_x_delta_x_function=Constant(value=0)
        f_y_delta_y_function=Constant(value=0) f_z_delta_z_function=Constant(value=0)
    FunctionBasedBushingForce 2mcp_flexion_passive_torque: socket_frame1=secondmc_offset socket_frame2=2proxph_offset
        rotational_damping=(0.0142 0 0)
      PhysicalOffsetFrame secondmc_offset: socket_parent=/bodyset/secondmc translation=(0.003501 -0.028243 0.00362)
          orientation=(0.5052 0.1871 0.0729)
      PhysicalOffsetFrame 2proxph_offset: socket_parent=/bodyset/2proxph translation=(0 0 0)
          orientation=(0.5052 0.1871 0.0729)
      m_x_theta_x_function: SimmSpline: x=(-1.5708 -1.48353 -1.39626 -1.309 -1.22173 -1.13446 -1.0472 -0.959931 -0.872665 -0.785398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)
          y=(-0.298165 -0.22595 -0.171253 -0.129824 -0.0984439 -0.0746759 -0.0566734 -0.0430378 -0.0327098 -0.024887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)
    FunctionBasedBushingForce 2pip_flexion_passive_torque: socket_frame1=2proxph_offset socket_frame2=2midph_offset
        rotational_damping=(0.0105 0 0)
      PhysicalOffsetFrame 2proxph_offset: socket_parent=/bodyset/2proxph translation=(0.007517 -0.041273 0.007326)
          orientation=(0.8101 0.2145 -0.0397)
      PhysicalOffsetFrame 2midph_offset: socket_parent=/bodyset/2midph translation=(0 0 0)
          orientation=(0.8101 0.2145 -0.0397)
      m_x_theta_x_function: SimmSpline: x=(0 0.0872665 0.174533 0.261799 0.349066 0.436332 0.523599 0.610865 0.698132 0.785398 1.22173 1.5708 2.0944)
          y=(-0.015 -0.00363989 0.00725323 0.0174561 0.0267453 0.0348977 0.0416899 0.0468986 0.0503006 0.0516725 0.075 0.11 0.25)
    FunctionBasedBushingForce 2dip_flexion_passive_torque: socket_frame1=2midph_offset socket_frame2=2distph_offset
        rotational_damping=(0.0081 0 0)
      PhysicalOffsetFrame 2midph_offset: socket_parent=/bodyset/2midph translation=(0.003333 -0.024888 0.00122)
          orientation=(-1.4139 -0.1578 -0.051)
      PhysicalOffsetFrame 2distph_offset: socket_parent=/bodyset/2distph translation=(0 0 0)
          orientation=(-1.4139 -0.1578 -0.051)
      m_x_theta_x_function: SimmSpline: x=(0 0.0872665 0.174533 0.261799 0.349066 0.436332 0.523599 0.610865 0.698132 0.785398 0.872665 0.959931 1.0472 1.13446 1.22173 1.309 1.39626 1.48353 1.5708)
          y=(0.019 0.0228295 0.0255162 0.0274708 0.0291039 0.0308263 0.0330487 0.0361817 0.0406362 0.0468227 0.055152 0.0660349 0.079882 0.0971039 0.118112 0.143315 0.173126 0.207955 0.248212)
    FunctionBasedBushingForce 3mcp_flexion_passive_torque: socket_frame1=thirdmc_offset socket_frame2=3proxph_offset
        rotational_damping=(0.0142 0 0)
      PhysicalOffsetFrame thirdmc_offset: socket_parent=/bodyset/thirdmc translation=(0.00024 -0.02629 0.001778)
          orientation=(-0.834919 -0.0281383 0.0395227)
      PhysicalOffsetFrame 3proxph_offset: socket_parent=/bodyset/3proxph translation=(0 0 0)
          orientation=(-0.834919 -0.0281383 0.0395227)
      m_x_theta_x_function: SimmSpline: x=(-1.5708 -1.48353 -1.39626 -1.309 -1.22173 -1.13446 -1.0472 -0.959931 -0.872665 -0.785398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)
          y=(-0.675606 -0.498608 -0.368205 -0.272131 -0.201349 -0.1492 -0.11078 -0.0824738 -0.0616194 -0.046255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)
    FunctionBasedBushingForce 3pip_flexion_passive_torque: socket_frame1=3proxph_offset socket_frame2=3midph_offset
        rotational_damping=(0.0105 0 0)
      PhysicalOffsetFrame 3proxph_offset: socket_parent=/bodyset/3proxph translation=(0.00165 -0.044211 0.00623)
          orientation=(1.43932 -0.0752642 0.0933288)
      PhysicalOffsetFrame 3midph_offset: socket_parent=/bodyset/3midph translation=(0 0 0)
          orientation=(1.43932 -0.0752642 0.0933288)
      m_x_theta_x_function: SimmSpline: x=(0 0.0872665 0.174533 0.261799 0.349066 0.436332 0.523599 0.610865 0.698132 0.785398 1.22173 1.5708 2.0944)
          y=(-0.0315 -0.00764377 0.0152318 0.0366578 0.0561651 0.0732852 0.0875488 0.0984871 0.105631 0.108512 0.1575 0.231 0.525)
    FunctionBasedBushingForce 3dip_flexion_passive_torque: socket_frame1=3midph_offset socket_frame2=3distph_offset
        rotational_damping=(0.0081 0 0)
      PhysicalOffsetFrame 3midph_offset: socket_parent=/bodyset/3midph translation=(0.001365 -0.029047 0.001954)
          orientation=(-0.591741 -0.101188 -0.0243735)
      PhysicalOffsetFrame 3distph_offset: socket_parent=/bodyset/3distph translation=(0 0 0)
          orientation=(-0.591741 -0.101188 -0.0243735)
      m_x_theta_x_function: SimmSpline: x=(0 0.0872665 0.174533 0.261799 0.349066 0.436332 0.523599 0.610865 0.698132 0.785398 0.872665 0.959931 1.0472 1.13446 1.22173 1.309 1.39626 1.48353 1.5708)
          y=(0.0399 0.0479419 0.053584 0.0576887 0.0611182 0.0647352 0.0694023 0.0759816 0.085336 0.0983277 0.115819 0.138673 0.167752 0.203918 0.248035 0.300961 0.363565 0.436706 0.521245)
    FunctionBasedBushingForce 4mcp_flexion_passive_torque: socket_frame1=fourthmc_offset socket_frame2=4proxph_offset
        rotational_damping=(0.0142 0 0)
      PhysicalOffsetFrame fourthmc_offset: socket_parent=/bodyset/fourthmc translation=(-0.0053 -0.0489 0.007)
          orientation=(-1.37151 0.0701008 0.0162527)
      PhysicalOffsetFrame 4proxph_offset: socket_parent=/bodyset/4proxph translation=(0 0 0)
          orientation=(-1.37151 0.0701008 0.0162527)
      m_x_theta_x_function: SimmSpline: x=(-1.5708 -1.48353 -1.39626 -1.309 -1.22173 -1.13446 -1.0472 -0.959931 -0.872665 -0.785398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)
          y=(-0.65841 -0.477249 -0.346097 -0.251148 -0.182409 -0.132645 -0.0966177 -0.0705357 -0.0516533 -0.0379833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)
    FunctionBasedBushingForce 4pip_flexion_passive_torque: socket_frame1=4proxph_offset socket_frame2=4midph_offset
        rotational_damping=(0.0105 0 0)
      PhysicalOffsetFrame 4proxph_offset: socket_parent=/bodyset/4proxph translation=(-0.0039 -0.0398 0.0057)
          orientation=(-0.612157 -0.055864 -0.081388)
      PhysicalOffsetFrame 4midph_offset: socket_parent=/bodyset/4midph translation=(0 0 0)
          orientation=(-0.612157 -0.055864 -0.081388)
      m_x_theta_x_function: SimmSpline: x=(0 0.0872665 0.174533 0.261799 0.349066 0.436332 0.523599 0.610865 0.698132 0.785398 1.22173 1.5708 2.0944)
          y=(-0.02475 -0.00600582 0.0119678 0.0288026 0.0441297 0.0575812 0.0687883 0.0773827 0.082996 0.0852596 0.12375 0.1815 0.4125)
    FunctionBasedBushingForce 4dip_flexion_passive_torque: socket_frame1=4midph_offset socket_frame2=4distph_offset
        rotational_damping=(0.0081 0 0)
      PhysicalOffsetFrame 4midph_offset: socket_parent=/bodyset/4midph translation=(-0.0026 -0.0245 0.0033)
          orientation=(-0.771777 -0.100371 -0.292873)
      PhysicalOffsetFrame 4distph_offset: socket_parent=/bodyset/4distph translation=(0 0 0)
          orientation=(-0.771777 -0.100371 -0.292873)
      m_x_theta_x_function: SimmSpline: x=(0 0.0872665 0.174533 0.261799 0.349066 0.436332 0.523599 0.610865 0.698132 0.785398 0.872665 0.959931 1.0472 1.13446 1.22173 1.309 1.39626 1.48353 1.5708)
          y=(0.03135 0.0376687 0.0421017 0.0453268 0.0480214 0.0508634 0.0545304 0.0596998 0.0670497 0.0772575 0.0910008 0.108958 0.131805 0.160221 0.194885 0.23647 0.285658 0.343126 0.40955)
    FunctionBasedBushingForce 5mcp_flexion_passive_torque: socket_frame1=fifthmc_offset socket_frame2=5proxph_offset
        rotational_damping=(0.0142 0 0)
      PhysicalOffsetFrame fifthmc_offset: socket_parent=/bodyset/fifthmc translation=(-0.0111 -0.0423 0.0097)
          orientation=(0.49878 -0.0735034 -0.205819)
      PhysicalOffsetFrame 5proxph_offset: socket_parent=/bodyset/5proxph translation=(0 0 0)
          orientation=(0.49878 -0.0735034 -0.205819)
      m_x_theta_x_function: SimmSpline: x=(-1.5708 -1.48353 -1.39626 -1.309 -1.22173 -1.13446 -1.0472 -0.959931 -0.872665 -0.785398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)
          y=(-0.339346 -0.255301 -0.192138 -0.144667 -0.10899 -0.0821768 -0.0620253 -0.0468804 -0.0354981 -0.0269438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)
    FunctionBasedBushingForce 5pip_flexion_passive_torque: socket_frame1=5proxph_offset socket_frame2=5midph_offset
        rotational_damping=(0.0105 0 0)
      PhysicalOffsetFrame 5proxph_offset: socket_parent=/bodyset/5proxph translation=(-0.0125 -0.0335 0.0043)
          orientation=(-2.94089 0.251254 0.289816)
      PhysicalOffsetFrame 5midph_offset: socket_parent=/bodyset/5midph translation=(0 0 0)
          orientation=(-2.94089 0.251254 0.289816)
      m_x_theta_x_function: SimmSpline: x=(0 0.0872665 0.174533 0.261799 0.349066 0.436332 0.523599 0.610865 0.698132 0.785398 1.22173 1.5708 2.0944)
          y=(-0.0165 -0.00400388 0.00797855 0.0192017 0.0294198 0.0383875 0.0458589 0.0515885 0.0553307 0.0568398 0.0825 0.121 0.275)
    FunctionBasedBushingForce 5dip_flexion_passive_torque: socket_frame1=5midph_offset socket_frame2=5distph_offset
        rotational_damping=(0.0081 0 0)
      PhysicalOffsetFrame 5midph_offset: socket_parent=/bodyset/5midph translation=(-0.0075 -0.0195 0.002)
          orientation=(1.61793 -0.439268 0.165285)
      PhysicalOffsetFrame 5distph_offset: socket_parent=/bodyset/5distph translation=(0 0 0)
          orientation=(1.61793 -0.439268 0.165285)
      m_x_theta_x_function: SimmSpline: x=(0 0.0872665 0.174533 0.261799 0.349066 0.436332 0.523599 0.610865 0.698132 0.785398 0.872665 0.959931 1.0472 1.13446 1.22173 1.309 1.39626 1.48353 1.5708)
          y=(0.0209 0.0251125 0.0280678 0.0302179 0.0320143 0.0339089 0.0363536 0.0397999 0.0446998 0.051505 0.0606672 0.0726384 0.0878702 0.106814 0.129923 0.157646 0.190439 0.228751 0.273033)
    ElasticFoundationForce 1proxph: transition_velocity=0.1
      ContactParametersSet contact_parameters:
        ContactParameters: geometry=jamar stiffness=120000000000 dissipation=1 static_friction=0.29
            dynamic_friction=0.29 viscous_friction=0
        ContactParameters: geometry=1proxph stiffness=72027027027 dissipation=1 static_friction=0.29
            dynamic_friction=0.29 viscous_friction=0
    ElasticFoundationForce 1distph: transition_velocity=0.1
      ContactParametersSet contact_parameters:
        ContactParameters: geometry=jamar stiffness=120000000000 dissipation=1 static_friction=0.29
            dynamic_friction=0.29 viscous_friction=0
        ContactParameters: geometry=1distph stiffness=72027027027 dissipation=1 static_friction=0.29
            dynamic_friction=0.29 viscous_friction=0
    ElasticFoundationForce 2proxph: transition_velocity=0.1
      ContactParametersSet contact_parameters:
        ContactParameters: geometry=jamar stiffness=120000000000 dissipation=1 static_friction=0.29
            dynamic_friction=0.29 viscous_friction=0
        ContactParameters: geometry=2proxph stiffness=72027027027 dissipation=1 static_friction=0.29
            dynamic_friction=0.29 viscous_friction=0
    ElasticFoundationForce 2midph: transition_velocity=0.1
      ContactParametersSet contact_parameters:
        ContactParameters: geometry=jamar stiffness=120000000000 dissipation=1 static_friction=0.29
            dynamic_friction=0.29 viscous_friction=0
        ContactParameters: geometry=2midph stiffness=72027027027 dissipation=1 static_friction=0.29
            dynamic_friction=0.29 viscous_friction=0
    ElasticFoundationForce 3proxph: transition_velocity=0.1
      ContactParametersSet contact_parameters:
        ContactParameters: geometry=jamar stiffness=120000000000 dissipation=1 static_friction=0.29
            dynamic_friction=0.29 viscous_friction=0
        ContactParameters: geometry=3proxph stiffness=72027027027 dissipation=1 static_friction=0.29
            dynamic_friction=0.29 viscous_friction=0
    ElasticFoundationForce 3midph: transition_velocity=0.1
      ContactParametersSet contact_parameters:
        ContactParameters: geometry=jamar stiffness=120000000000 dissipation=1 static_friction=0.29
            dynamic_friction=0.29 viscous_friction=0
        ContactParameters: geometry=3midph stiffness=72027027027 dissipation=1 static_friction=0.29
            dynamic_friction=0.29 viscous_friction=0
    ElasticFoundationForce 4proxph: transition_velocity=0.1
      ContactParametersSet contact_parameters:
        ContactParameters: geometry=jamar stiffness=120000000000 dissipation=1 static_friction=0.29
            dynamic_friction=0.29 viscous_friction=0
        ContactParameters: geometry=4proxph stiffness=72027027027 dissipation=1 static_friction=0.29
            dynamic_friction=0.29 viscous_friction=0
    ElasticFoundationForce 4midph: transition_velocity=0.1
      ContactParametersSet contact_parameters:
        ContactParameters: geometry=jamar stiffness=120000000000 dissipation=1 static_friction=0.29
            dynamic_friction=0.29 viscous_friction=0
        ContactParameters: geometry=4midph stiffness=72027027027 dissipation=1 static_friction=0.29
            dynamic_friction=0.29 viscous_friction=0
    ElasticFoundationForce 5proxph: transition_velocity=0.1
      ContactParametersSet contact_parameters:
        ContactParameters: geometry=jamar stiffness=120000000000 dissipation=1 static_friction=0.29
            dynamic_friction=0.29 viscous_friction=0
        ContactParameters: geometry=5proxph stiffness=72027027027 dissipation=1 static_friction=0.29
            dynamic_friction=0.29 viscous_friction=0
    ElasticFoundationForce 5midph: transition_velocity=0.1
      ContactParametersSet contact_parameters:
        ContactParameters: geometry=jamar stiffness=120000000000 dissipation=1 static_friction=0.29
            dynamic_friction=0.29 viscous_friction=0
        ContactParameters: geometry=5midph stiffness=72027027027 dissipation=1 static_friction=0.29
            dynamic_friction=0.29 viscous_friction=0
    ElasticFoundationForce 2distph: transition_velocity=0.1
      ContactParametersSet contact_parameters:
        ContactParameters: geometry=jamar stiffness=120000000000 dissipation=1 static_friction=0.29
            dynamic_friction=0.29 viscous_friction=0
        ContactParameters: geometry=2distph stiffness=72027027027 dissipation=1 static_friction=0.29
            dynamic_friction=0.29 viscous_friction=0
    ElasticFoundationForce 3distph: transition_velocity=0.1
      ContactParametersSet contact_parameters:
        ContactParameters: geometry=jamar stiffness=120000000000 dissipation=1 static_friction=0.29
            dynamic_friction=0.29 viscous_friction=0
        ContactParameters: geometry=3distph stiffness=72027027027 dissipation=1 static_friction=0.29
            dynamic_friction=0.29 viscous_friction=0
    ElasticFoundationForce 4distph: transition_velocity=0.1
      ContactParametersSet contact_parameters:
        ContactParameters: geometry=jamar stiffness=120000000000 dissipation=1 static_friction=0.29
            dynamic_friction=0.29 viscous_friction=0
        ContactParameters: geometry=4distph stiffness=72027027027 dissipation=1 static_friction=0.29
            dynamic_friction=0.29 viscous_friction=0
    ElasticFoundationForce 5distph: transition_velocity=0.1
      ContactParametersSet contact_parameters:
        ContactParameters: geometry=jamar stiffness=120000000000 dissipation=1 static_friction=0.29
            dynamic_friction=0.29 viscous_friction=0
        ContactParameters: geometry=5distph stiffness=72027027027 dissipation=1 static_friction=0.29
            dynamic_friction=0.29 viscous_friction=0
    CoordinateActuator deviation_act: min_control=-1 max_control=1 coordinate=deviation optimal_force=1
    CoordinateActuator flexion_act: min_control=-1 max_control=1 coordinate=flexion optimal_force=1
    CoordinateActuator wrist_hand_r1_act: min_control=-1 max_control=1 coordinate=wrist_hand_r1 optimal_force=1
    CoordinateActuator cmc_flexion_act: min_control=-1 max_control=1 coordinate=cmc_flexion optimal_force=2
    CoordinateActuator cmc_abduction_act: min_control=-1 max_control=1 coordinate=cmc_abduction optimal_force=2
    CoordinateActuator mp_flexion_act: min_control=-1 max_control=1 coordinate=mp_flexion optimal_force=2
    CoordinateActuator ip_flexion_act: min_control=-1 max_control=1 coordinate=ip_flexion optimal_force=2
    CoordinateActuator 2mcp_abduction_act: min_control=-1 max_control=1 coordinate=2mcp_abduction optimal_force=4.4
    CoordinateActuator 2mcp_flexion_act: min_control=-1 max_control=1 coordinate=2mcp_flexion optimal_force=4.4
    CoordinateActuator 2pm_flexion_act: min_control=-1 max_control=1 coordinate=2pm_flexion optimal_force=2.3
    CoordinateActuator 2md_flexion_act: min_control=-1 max_control=1 coordinate=2md_flexion optimal_force=0.72
    CoordinateActuator 3mcp_abduction_act: min_control=-1 max_control=1 coordinate=3mcp_abduction optimal_force=4.4
    CoordinateActuator 3mcp_flexion_act: min_control=-1 max_control=1 coordinate=3mcp_flexion optimal_force=4.4
    CoordinateActuator 3pm_flexion_act: min_control=-1 max_control=1 coordinate=3pm_flexion optimal_force=2.3
    CoordinateActuator 3md_flexion_act: min_control=-1 max_control=1 coordinate=3md_flexion optimal_force=0.72
    CoordinateActuator 4mcp_abduction_act: min_control=-1 max_control=1 coordinate=4mcp_abduction optimal_force=4.4
    CoordinateActuator 4mcp_flexion_act: min_control=-1 max_control=1 coordinate=4mcp_flexion optimal_force=4.4
    CoordinateActuator 4pm_flexion_act: min_control=-1 max_control=1 coordinate=4pm_flexion optimal_force=2.3
    CoordinateActuator 4md_flexion_act: min_control=-1 max_control=1 coordinate=4md_flexion optimal_force=0.72
    CoordinateActuator 5mcp_abduction_act: min_control=-1 max_control=1 coordinate=5mcp_abduction optimal_force=4.4
    CoordinateActuator 5mcp_flexion_act: min_control=-1 max_control=1 coordinate=5mcp_flexion optimal_force=4.4
    CoordinateActuator 5pm_flexion_act: min_control=-1 max_control=1 coordinate=5pm_flexion optimal_force=2.3
    CoordinateActuator 5md_flexion_act: min_control=-1 max_control=1 coordinate=5md_flexion optimal_force=0.72
  ContactGeometrySet:
    ContactMesh 1proxph: socket_frame=/bodyset/proximal_thumb location=(-0.0005769911 0.003207498 0.0003088121)
        orientation=(-0.01931465 0.8611767 0.9450442) filename=1proxph_skin.obj
    ContactMesh 1distph: socket_frame=/bodyset/distal_thumb location=(0.00063457 -0.002734474 -0.00138807)
        orientation=(2.373724 -0.995971 1.925816) filename=1distph_skin.obj
    ContactMesh 2proxph: socket_frame=/bodyset/2proxph location=(-6.458159e-13 -7.99394e-12 -0.0007148881)
        orientation=(-1.19349e-15 -1.072059e-15 4.731458e-16) filename=2proxph_skin.obj
    ContactMesh 2midph: socket_frame=/bodyset/2midph location=(1.547928e-12 6.847744e-12 9.094393e-5)
        orientation=(-2.220446e-15 2.053913e-15 4.224052e-16) filename=2midph_skin.obj
    ContactMesh 2distph: socket_frame=/bodyset/2distph location=(-0.0002314506 0.0001505348 -0.0002392684)
        orientation=(-0.004097238 0.004541973 0.05717682) filename=2distph_skin.obj
    ContactMesh 3proxph: socket_frame=/bodyset/3proxph location=(4.361511e-13 -2.589651e-12 -0.0001150121)
        orientation=(5.273559e-16 6.591949e-17 -1.692411e-32) filename=3proxph_skin.obj
    ContactMesh 3midph: socket_frame=/bodyset/3midph location=(-5.83644e-13 -1.141975e-12 -0.000600656)
        orientation=(1.665335e-16 -6.661338e-16 3.747003e-16) filename=3midph_skin.obj
    ContactMesh 3distph: socket_frame=/bodyset/3distph location=(-2.366263e-8 -4.134621e-8 -0.0008444596)
        orientation=(-0.00296105 0.003844624 0.0499143) filename=3distph_skin.obj
    ContactMesh 4proxph: socket_frame=/bodyset/4proxph location=(8.469336e-13 3.45296e-12 -0.0002302924)
        orientation=(8.743006e-16 -3.278627e-16 5.464379e-17) filename=4proxph_skin.obj
    ContactMesh 4midph: socket_frame=/bodyset/4midph location=(7.138738e-14 2.837176e-13 -0.0003447476)
        orientation=(3.747003e-16 -1.405126e-16 1.756408e-17) filename=4midph_skin.obj
    ContactMesh 4distph: socket_frame=/bodyset/4distph location=(-1.716414e-7 1e-6 -0.000665)
        orientation=(0.007416689 -0.1138061 0.05372993) filename=4distph_skin.obj
    ContactMesh 5proxph: socket_frame=/bodyset/5proxph location=(-1.501022e-13 -1.02543e-12 -0.0001003093)
        orientation=(0 0 1.091141e-15) filename=5proxph_skin.obj
    ContactMesh 5midph: socket_frame=/bodyset/5midph location=(-0.000360113 0.0005404754 0.0001773186)
        orientation=(0.002619911 0.003742474 0.05110835) filename=5midph_skin.obj
    ContactMesh 5distph: socket_frame=/bodyset/5distph location=(-2.325362e-13 -7.439882e-13 -0.0002826216)
        orientation=(2.220446e-16 -5.551115e-17 3.885781e-16) filename=5distph_skin.obj
    ContactMesh jamar: socket_frame=/bodyset/GripForceBody location=(0.006166358 0.00256051 -0.03235)
        filename=jamar.obj
